// -------------------------------------------------------------------
// -------------------- SIMPLEPELVIS WORK BRANCH ---------------------
// --------------------------- pelvicfloor ---------------------------
// -------------------------------------------------------------------

#include "../libdef.any"
#include "<ANYBODY_PATH_MODELUTILS>/Drivers/Fourier.any"


Main = {

  ///////////////////////////////////////////////////
  // Body Model Configuration.
  // This would often be located in a seperate
  // file (BodyModelConfig.any) in other examples
  ///////////////////////////////////////////////////

  // New flexible thorax is enabled with:
  // #define BM_TRUNK_THORACIC_MODEL _THORACIC_MODEL_RIGID_
  #define BM_TRUNK_THORACIC_MODEL _THORACIC_MODEL_FLEXIBLE_

  // only head, thorax and pelvis required
  #define BM_LEG_MODEL OFF
  #define BM_ARM_LEFT OFF
  #define BM_ARM_RIGHT OFF

  // Note: Model doesn't yet work without muscles
  #define BM_TRUNK_MUSCLES ON

  // The new thoracic model comes with a full set of
  // ligaments all along the spine. They can be enabled
  // with the following switch.
  #define BM_TRUNK_LIGAMENTS OFF

  // Set scaling of pelvic floor
  #define BM_SCALING _SCALING_UNIFORM_

  // This example comes with custom fourier drivers for the
  // spine motion. So here we disable the default drivers
  #define BM_MANNEQUIN_DRIVER_PELVIS_THORAX_EXTENSION OFF
  #define BM_MANNEQUIN_DRIVER_PELVIS_THORAX_ROTATION OFF
  #define BM_MANNEQUIN_DRIVER_PELVIS_THORAX_LATERAL_BENDING OFF

  // Disable neck drivers and link the degrees of freedom to the
  // rest of the spine.
  #define BM_MANNEQUIN_DRIVER_SKULL_THORAX_FLEXION OFF
  #define BM_MANNEQUIN_DRIVER_SKULL_THORAX_LATERALBENDING OFF
  #define BM_MANNEQUIN_DRIVER_SKULL_THORAX_ROTATION OFF
  #define BM_TRUNK_CERVICAL_THORACIC_LINK ON


  // -------------------------------------------------------------------
  // --------------------------- SIMPLEPELVIS --------------------------
  // -------------------------------------------------------------------

  /*
    Here, all structures and parameters for the SimplePelvis model will be initiated.
    If you want SimplePelvis to be actually included into model, switch must be turned ON.
    Switch turned OFF loads the current version of the thoracic model of AMMR4-Beta.
  */

  #define BM_SIMPLEPELVIS ON

  #include "<ANYBODY_PATH_BODY>/Trunk/SimplePelvis.any"

  // -------------------------------------- END OF SIMPLEPELVIS SETUP


  // Include the human model
  #include "<ANYBODY_PATH_BODY>/HumanModel.any"

  AnyFolder Model = {
     AnyFolder& BodyModel = Main.HumanModel.BodyModel;
     AnyFolder& DefaultDrivers = Main.HumanModel.DefaultMannequinDrivers;

     AnyReacForce PelvisGroundReactions = {
       AnyKinMeasure& lin = .BodyModel.Interface.Trunk.PelvisPosX.lin;
       AnyKinMeasure& rot = .BodyModel.Interface.Trunk.PelvisRotX.rot;
     };
  };


  // -------------------------------------------------------------------
  // ------------------------------- STUDY -----------------------------
  // -------------------------------------------------------------------

  AnyBodyStudy Study = {
    AnyFolder& Model = Main.Model;
    InverseDynamics.Criterion.UpperBoundOnOff = Off;
    InverseDynamics.Criterion.Type = MR_MinMaxStrict;     // MuscleRecruitment algorithm
    // InverseDynamics.Criterion.LowerBoundOnOff = On;    // set minimum level of activation for all muscles
    // InverseDynamics.Criterion.LowerBound = 0.05;

    InverseDynamics.ForceDepKinOnOff = Off;               // command Study to apply FDK during InverseDynamics
    InverseDynamics.ForceDepKin.ForceTol = 0.75;          // increase value if InvDyn seems stuck in endless loop
    InverseDynamics.ForceDepKin.MaxNewtonStep = 0.1;      // default 0.001, tradeoff between stability and speed

    tStart = 0;
    tEnd = 1;
    Gravity = {0, -9.81, 0.0};
    nStep = 26;                   // to adjust resolution of time-history of testcases

    AnyFolder &BodyModel            = Main.HumanModel.BodyModel;
    AnyFolder &ThoracicDrivers      = Main.ThoracicDrivers; // reference drivers of thoracic.main within study
    AnyVar PelvisThoraxFlexionDeg = Main.HumanModel.BodyModel.Interface.Trunk.PelvisThoraxExtension.Pos[0]*180/pi;

    // Include functions to generate a video:
    // -> Run `Study.VideoTool.Preview` to preview the camera view.
    // -> Run `Study.VideoTool.Create_Video` to generate video from the analysis.
    #include "CreateVideo.any"
    };
  // -------------------------------------- END OF STUDY

};
