// additional segments for insertion and origin points of pelvic floor muscles

AnyFloat Inertia = 1e-7*{0.1, 0.5, 0.5};
AnyFloat RGB = {0.69, 0.69, 0.69};

// vaginal side-wall, right
AnySeg SegmentA = {
  r0 = {0, 0, 0};
  Mass = 0.05;                Jii = .Inertia;
  viewInertia.Visible = On;   viewInertia.RGB = .RGB;

  AnyRefNode NodePUBIS_R = {
    // has the same position as PUBIS_R
    sRel = {..BONYPELVIS.PUBIS_R.sRel[0] - .r0[0],
            ..BONYPELVIS.PUBIS_R.sRel[1] - .r0[1],
            ..BONYPELVIS.PUBIS_R.sRel[2] - .r0[2] };
    // AnyDrawNode drw = {
    //   ScaleXYZ = 0.08*{0.025, 0.025, 0.025};
    //   RGB = {0.0, 0.88, 1.0};
    // };
  };
};

// vaginal side-wall, left
AnySeg SegmentB = {
  r0 = {0, 0, 0};
  Mass = 0.05;                Jii = .Inertia;
  viewInertia.Visible = On;   viewInertia.RGB = .RGB;

  AnyRefNode NodePUBIS_L = {
    // has the same position as PUBIS_L
    sRel = {..BONYPELVIS.PUBIS_R.sRel[0] - .r0[0],
            ..BONYPELVIS.PUBIS_R.sRel[1] - .r0[1],
            ..BONYPELVIS.PUBIS_R.sRel[2] - .r0[2] };
  };
};

// perineum
AnySeg SegmentC = {
  r0 = {0, 0, 0};
  Mass = 0.05;                Jii = .Inertia;
  viewInertia.Visible = On;   viewInertia.RGB = .RGB;

  AnyRefNode NodePUBIS_R = {
    // has the same position as PUBIS_R
    sRel = {..BONYPELVIS.PUBIS_R.sRel[0] - .r0[0],
            ..BONYPELVIS.PUBIS_R.sRel[1] - .r0[1],
            ..BONYPELVIS.PUBIS_R.sRel[2] - .r0[2] };
  };
};

// rectal side-wall, right
AnySeg SegmentD = {
  r0 = {0, 0, 0};
  Mass = 0.05;                Jii = .Inertia;
  viewInertia.Visible = On;   viewInertia.RGB = .RGB;

  AnyRefNode NodePUBIS_R = {
    // has the same position as PUBIS_R
    sRel = {..BONYPELVIS.PUBIS_R.sRel[0] - .r0[0],
            ..BONYPELVIS.PUBIS_R.sRel[1] - .r0[1],
            ..BONYPELVIS.PUBIS_R.sRel[2] - .r0[2] };
  };
};

// rectal side-wall, left
AnySeg SegmentE = {
  r0 = {0, 0, 0};
  Mass = 0.05;                Jii = .Inertia;
  viewInertia.Visible = On;   viewInertia.RGB = .RGB;

  AnyRefNode NodePUBIS_R = {
    // has the same position as PUBIS_R
    sRel = {..BONYPELVIS.PUBIS_R.sRel[0] - .r0[0],
            ..BONYPELVIS.PUBIS_R.sRel[1] - .r0[1],
            ..BONYPELVIS.PUBIS_R.sRel[2] - .r0[2] };
  };
};

// posterior part of rectum
AnySeg SegmentF = {
  r0 = {0, 0, 0};
  Mass = 0.05;                Jii = .Inertia;
  viewInertia.Visible = On;   viewInertia.RGB = .RGB;

  AnyRefNode NodePUBIS_R = {
    // has the same position as PUBIS_R
    sRel = {..BONYPELVIS.PUBIS_R.sRel[0] - .r0[0],
            ..BONYPELVIS.PUBIS_R.sRel[1] - .r0[1],
            ..BONYPELVIS.PUBIS_R.sRel[2] - .r0[2] };
  };
};

// central point of anococcygeal ligament
AnySeg SegmentG = {
  r0 = {0, 0, 0};
  Mass = 0.05;                Jii = .Inertia;
  viewInertia.Visible = On;   viewInertia.RGB = .RGB;

  AnyRefNode NodePUBIS_R = {
    // has the same position as PUBIS_R
    sRel = {..BONYPELVIS.PUBIS_R.sRel[0] - .r0[0],
            ..BONYPELVIS.PUBIS_R.sRel[1] - .r0[1],
            ..BONYPELVIS.PUBIS_R.sRel[2] - .r0[2] };
  };
};

// 1st point on tendinous arc of LAM, right
AnySeg SegmentS = {
  r0 = {0, 0, 0};
  Mass = 0.05;                Jii = .Inertia;
  viewInertia.Visible = On;   viewInertia.RGB = .RGB;

  AnyRefNode NodePUBIS_R = {
    // has the same position as PUBIS_R
    sRel = {..BONYPELVIS.PUBIS_R.sRel[0] - .r0[0],
            ..BONYPELVIS.PUBIS_R.sRel[1] - .r0[1],
            ..BONYPELVIS.PUBIS_R.sRel[2] - .r0[2] };
  };
};

// 2nd point on tendinous arc of LAM, right
AnySeg SegmentT = {
  r0 = {0, 0, 0};
  Mass = 0.05;                Jii = .Inertia;
  viewInertia.Visible = On;   viewInertia.RGB = .RGB;

  AnyRefNode NodePUBIS_R = {
    // has the same position as PUBIS_R
    sRel = {..BONYPELVIS.PUBIS_R.sRel[0] - .r0[0],
            ..BONYPELVIS.PUBIS_R.sRel[1] - .r0[1],
            ..BONYPELVIS.PUBIS_R.sRel[2] - .r0[2] };
  };
};

// 3rd point on tendinous arc of LAM, right
AnySeg SegmentU = {
  r0 = {0, 0, 0};
  Mass = 0.05;                Jii = .Inertia;
  viewInertia.Visible = On;   viewInertia.RGB = .RGB;

  AnyRefNode NodePUBIS_R = {
    // has the same position as PUBIS_R
    sRel = {..BONYPELVIS.PUBIS_R.sRel[0] - .r0[0],
            ..BONYPELVIS.PUBIS_R.sRel[1] - .r0[1],
            ..BONYPELVIS.PUBIS_R.sRel[2] - .r0[2] };
  };
};

// 4th point on tendinous arc of LAM, right
AnySeg SegmentV = {
  r0 = {0, 0, 0};
  Mass = 0.05;                Jii = .Inertia;
  viewInertia.Visible = On;   viewInertia.RGB = .RGB;

  AnyRefNode NodePUBIS_R = {
    // has the same position as PUBIS_R
    sRel = {..BONYPELVIS.PUBIS_R.sRel[0] - .r0[0],
            ..BONYPELVIS.PUBIS_R.sRel[1] - .r0[1],
            ..BONYPELVIS.PUBIS_R.sRel[2] - .r0[2] };
  };
};

// 1st point on tendinous arc of LAM, left
AnySeg SegmentW = {
  r0 = {0, 0, 0};
  Mass = 0.05;                Jii = .Inertia;
  viewInertia.Visible = On;   viewInertia.RGB = .RGB;

  AnyRefNode NodePUBIS_R = {
    // has the same position as PUBIS_R
    sRel = {..BONYPELVIS.PUBIS_R.sRel[0] - .r0[0],
            ..BONYPELVIS.PUBIS_R.sRel[1] - .r0[1],
            ..BONYPELVIS.PUBIS_R.sRel[2] - .r0[2] };
  };
};

// 2nd point on tendinous arc of LAM, left
AnySeg SegmentX = {
  r0 = {0, 0, 0};
  Mass = 0.05;                Jii = .Inertia;
  viewInertia.Visible = On;   viewInertia.RGB = .RGB;

  AnyRefNode NodePUBIS_R = {
    // has the same position as PUBIS_R
    sRel = {..BONYPELVIS.PUBIS_R.sRel[0] - .r0[0],
            ..BONYPELVIS.PUBIS_R.sRel[1] - .r0[1],
            ..BONYPELVIS.PUBIS_R.sRel[2] - .r0[2] };
  };
};

// 3rd point on tendinous arc of LAM, left
AnySeg SegmentY = {
  r0 = {0, 0, 0};
  Mass = 0.05;                Jii = .Inertia;
  viewInertia.Visible = On;   viewInertia.RGB = .RGB;

  AnyRefNode NodePUBIS_R = {
    // has the same position as PUBIS_R
    sRel = {..BONYPELVIS.PUBIS_R.sRel[0] - .r0[0],
            ..BONYPELVIS.PUBIS_R.sRel[1] - .r0[1],
            ..BONYPELVIS.PUBIS_R.sRel[2] - .r0[2] };
  };
};

// 4th point on tendinous arc of LAM, left
AnySeg SegmentZ = {
  r0 = {0, 0, 0};
  Mass = 0.05;                Jii = .Inertia;
  viewInertia.Visible = On;   viewInertia.RGB = .RGB;

  AnyRefNode NodePUBIS_R = {
    // has the same position as PUBIS_R
    sRel = {..BONYPELVIS.PUBIS_R.sRel[0] - .r0[0],
            ..BONYPELVIS.PUBIS_R.sRel[1] - .r0[1],
            ..BONYPELVIS.PUBIS_R.sRel[2] - .r0[2] };
  };
};
