/*
  This is the main file to add the SimplePelvis model to the Thoracic model of AMMR4 Beta
*/

// set anthropometrics according to subject
Main.HumanModel.Anthropometrics = {
  // values from Gmür et al., 2025, mean values for control group
  BodyMass = 60.5;
  BodyHeight = 1.66;
};

// SCALING
#include "SimplePelvisScaling.any"


// SEGMENTS AND NODES
#include "SimplePelvisSegments.any"


// JOINTS + FDK
#include "SimplePelvisJoints.any"


// MUSCLES
#include "SimplePelvisMuscles.any"


// LIGAMENTS
#include "SimplePelvisLigaments.any"


// DRIVERS
#include "SimplePelvisDrivers.any"


// ABDOMINAL PRESSURE
Main.HumanModel.BodyModel.Trunk = {
  AnyFolder AbdominalPressure = {
    // pressure is forces distributed over volume nodes
    AnyForce3D IAP = {
      AnyRefFrame &PoA = Main.HumanModel.BodyModel.Trunk.Abdominal.Layer_L5.CavitySegPosterior.VolumePoints.Center;
      // change in pressure from rest to valsalva: approx. 18.3 kPa --> 18300 N/m^2 [Schünke, 2022]
      // testcase2: cut pressure in half -> IAP = 70 N
      // pressure acts on pelvic outlet with diameter of 9 - 11 cm, assume to be circular with d = 10 cm
      // skewed at angle of 15° from horizontal [Prometheus]
      // F_IAP = p * A / F_IAPx = F_IAP * sin(15°) / F_IAPy = F_IAP * cos(15°)
      F = {-18.1, -67.6, 0}*t;
    };
  };
};


// OUTPUT
#include "SimplePelvisOutput.any"


// KINEMATIC MEASURES
Main.DrawSettings.KinematicVolume = {
  Opacity = 0.1;
};
